# Worksheet setting: ORIGIN = 1
# Deflections of beam with variable flexural intertia.
# Euler-Bernoulli theory allows for defintion of the following relationship between moment M and curvature y":
#
# M/EI == y''  (1)
#
# Therefore:
#
# M == EIy''  (2)
#
# It's possible to differentiate (2) respect to the lenght coordinate x, to obtain:
#
# dM/dx == d(EI*y'')/dx == EI'y'' + EIy'''
#
# As EI is constant, differentiation of a product applies. THe left side of equation is shear
#
# V == EI'y'' + EIy'''  (3)
#
# Equation (3) can be differentiated again to obtain:
#
# dV/dx == EI''y'' + EI'y''' + EI'y''' + EIy''''
#
# dV/dx == EI''y'' + 2*EI'y''' + EIy''''  (4)
#
# The left side of the equation equals applied load. thus:
#
# w(x) == EI''y'' + 2*EI'y''' + EIy''''  (5)
#
# If EI is constant, (5) reduces to:
#
# w(x) == EIy''''  (6)
#
# Which is the form that is usually observed, However as the properties are now variable, (5) applies. its solution is not trivial as it's an ordinary differential equation with variable coefficients, particularly for the pattern of EI we are exploring. Maybe a solution considering Mathieu's Differential Equation would be plausible, but that would be quite difficult to achieve in my personal opinion.
#
# Rather I advise going back to equation (1) and work with statically determinate beams (simply supported and in cantilever position. if that is the case, it can be integrated directly, leading to:
#
# integral(M/EI, x) + c_1 == y'  (6)
#
# integral(integral(M/EI, x), x) + c_1x + c_2 == y  (7)
#
# For example, for a cantilever beam with the coordinate system at the end. both constants become zero, as moment and shear must be zero at this location. Keep in mind that M is known as we are studying determinate beams. (indeterminate beams can be assessed afterwards through superposition).
#
# Lest solve the case of a cantilever beam with a point load at its end. Also, consider a coordinate system with the origin a the fixed end. If that is the case, constants c1 and c2 are zero as rotation and displacement at this location are zero. if that is the case, equation (7) becomes:
#
# integral(integral((PL - Px)/EI(x), x), x) == y  (8)
#
# Let's introduce a normalizing variable z = x/L. and express the flexural intertia as
# EI = EIoS(z), where S(z) is the term that conditions how the intertia of the perforated beam changes along lenght, when compared to the uniform one. if that is done on (8) following is obatined:
#
# integral(integral((PL - PLz)/EI_0S(z), zL), zL) == y
# PL^2/EI_O*integral(integral((1 - z)/S(z), z), z) == y  (9)
# Keep in mind that z varies between zero and one. Deflection at the tip is simply:
#
# PL^2/EI_O*integral(integral((1 - z)/S(z), z = 0 .. 1), z = 0 .. 1) == Δ  (10)
#
# Now
#
# The last one is the deflection function! I think we can compare now with numerical simulations and tests results to see if the proposed variation is a reasonable choice. If not we can explore simplified expressions considering Legendre and Hermite Polynimals. Even If it is reasonable I will look for an alternate representation considering them. Also you are welcome to try solving this analytically in mathcad or matlab. If what you get from this equation is promising, I will seek an analytic expression using Mathematica.
#
# M(z) == w*L*z/2 - w*z^2/2
#
# x := 1
#
# z := x*L
#
# M(x) == w*L^2*(x - x^2)/2
S(x, γ, α, κ, Ae) :=
    if x ≤ 1
        a_g ← Ae - κ*(((γ + 1)/(2*γ))*sin(2*π*(γ + 1)*x - π*γ + α) + ((γ - 1)/(2*γ))*sin(2*π*(γ - 1)*x - π*γ + α) - sin(2*π*γ*x - π*γ + α))^2
    else
        a_g ← 0
    return a_g
t := 0, 0.01 .. 1
# [plot: S(t, 4, 0, 0.024, 1) vs t]
tv := t = [
    0; 0.01; 0.02; 0.03; 0.04; 0.05; 0.06; 0.07; 0.08; 0.09
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]
min(vectorize(S(tv, 4, 0, 0.3, 1.2))) = 0.0805058
Smin(a, b, c, d) := min(vectorize(S(tv, a, b, c, d)))
# Displacement Calculation
# Overall loading and beam characteristics
ω := 500
E := 200000
Io := 684600000
Lb := 3662
# First Integral | Second Integral
do := ω*Lb^4/(2*E*Io)
do = 328.357
fi(x, γ, α, κ, Ae) := integral((1 - v)*v/S(v, γ, α, κ, Ae), v = 0 .. x)
si(x, γ, α, κ, Ae) := integral(fi(v, γ, α, κ, Ae), v = 0 .. x)
de(x, γ, α, κ, Ae) := si(x, γ, α, κ, Ae) - x*si(1, γ, α, κ, Ae)
d(x, γ, α, κ, Ae) :=
    if S(x, γ, α, κ, Ae) > 0
        d ← -do*de(x, γ, α, κ, Ae)
    else
        d ← 1000
Prd(xo, γ, α, κ, Ae) := vectorize(d(xo, γ, α, κ, Ae))
de(0.5, 5, 0, 0.25, 1) = -0.0730103
# Observed deflections (Either in FEM or experiments)
# Deflections (mm) | Locations of deflections (normalized by beam length )
# Note:
# Only put the deflection values once. Do not repeat them!!!
xo := [0.162; 0.247; 0.331; 0.416; 0.5]
yo := [7.3799; 11.857; 15.655; 17.908; 18.76]
γ := 6  # Gamma parameter corresponding to the number of holes (fixed during optimization)
α := 0
Oc(P3, P4) := sum((1 - Prd(xo, γ, α, P3, P4)/yo)^2)  # Optimization Criteria
# Example, Uniform Case
fiu(x) := integral((1 - v)*v, v = 0 .. x)
siu(x) := integral(fiu(v), v = 0 .. x)
deu(x) := siu(x) - x*siu(1)
deu(0.5) = -0.0260417
10/384 = 0.0260417  # Works!!!!
# Optimization Algorithm
solve block
    # guess values
    κ := 0.2
    Ae := 1.5
    # constraints
    Ae > 0
    Smin(γ, α, κ, Ae) > 0.02
    # solver
    Out := minimize(Oc, κ, Ae)
end solve block
# Results
# Output Parameters | Error Criterium
Out = [0.401711; 1.5863]  # k
Oc(Out[1], Out[2]) = 0.00557567
Ae
# Found Deflections | Target Deflections
Prd(xo, γ, α, Out[1], Out[2]) = [7.72679; 11.5207; 14.9469; 17.879; 19.1849]
yo = [7.3799; 11.857; 15.655; 17.908; 18.76]
# [plot: S(t, γ, α, Out[1], Out[2]) vs t]
